// COMSOL Multiphysics 6.4.0.429 model "3. 3D Circular Channel Poiseulle flow.mph"
// Outline of the model tree

Parameters
  P_in = 100 [Pa]
  P_out = 0 [Pa]
  ch_radius = 100E-6 [m]
  ch_diameter = 2 * ch_radius
  ch_length = 5E-3 [m]
  dp = abs(P_in - P_out)
  wisc = 0.001 [Pa*s]

Variables
  var1 "Variables 1"
    velocity_an = ((dp)/(4*wisc*ch_length))*(ch_radius^2 - (y^2 + z^2))  // Analytical Velocity
    max_v_an = (dp/(4*wisc*ch_length))*ch_radius^2  // Analytical Maximum Velocity
    absEr_v = abs(spf.U - max_v_an)  // absolute error
    Er_vMax = (absEr_v/max_v_an)*100  // total Error Percentage
    Pressure_an = (dp/ch_length)*(ch_length - x) + P_out  // Analytical Pressure
    VFlowRate_an = pi * ((ch_radius^4)/(8*wisc*ch_length)) * dp  // Analytical Volumetric Flow Rate

Geometry
  geom1 "Geometry 1" (3D, length unit m)
    cyl1: Cylinder "Channel" | r = ch_radius; h = ch_length; axistype = x
    fin: Finalize "Form Union"

Materials
  mat1: Common "H2O (water) [liquid]" on all domains
    def: def "Basic"
      thermalconductivity = k_liquid_2(T)
      thermalexpansioncoefficient = (alpha_liquid_2(T)+(Tempref-293[K])*if(abs(T-Tempref)>1e-3,(alpha_liquid_2(T)-alpha_liquid_2(Tempref))/(T-Tempref),d(alpha_liquid_2(T),T)))/(1+alpha_liquid_2(Tempref)*(Tempref-293[K]))
      heatcapacity = C_liquid_2(T)
      HC = HC_liquid_2(T)
      VP = VP_liquid_2(T)
      density = rho_liquid_2(T)
      TD = TD_liquid_2(T)
      dynamicviscosity = eta_liquid_1(T)
      SurfF = SurfF(T)
      k_liquid_2: Piecewise | arg = T; pieces = {275.0, 370.0, -0.9003748+0.008387698*T^1-1.118205E-5*T^2}; argunit = K; fununit = W/(m*K)
      alpha_liquid_2: Piecewise
        arg = T
        pieces = 
          {273.15, 283.0, 0.01032507-7.62815E-5*T^1+1.412474E-7*T^2}
          {283.0, 373.16, -0.002464189354+1.947611E-5*T^1-5.049672E-8*T^2+4.616995E-11*T^3}
        argunit = K
        fununit = 1/K
      C_liquid_2: Piecewise | arg = T; pieces = {293.0, 373.16, 4035.840794+0.4923120336*T^1}; argunit = K; fununit = J/(kg*K)
      HC_liquid_2: Piecewise | arg = T; pieces = {293.0, 373.16, 72.6451184+0.008861615768*T^1}; argunit = K; fununit = J/(mol*K)
      VP_liquid_2: Piecewise | arg = T; pieces = {280.0, 600.0, (exp((-2.005121830e+03/T-5.565700000e-01*log10(T)+9.898790000e+00-1.111690086e+07/T^3)*log(10.0)))*1.333200000e+02}; argunit = K; fununit = Pa
      rho_liquid_2: Piecewise
        arg = T
        pieces = 
          {273.15, 283.0, 972.7578145+0.2084*T^1-4.0E-4*T^2}
          {283.0, 373.16, 345.28+5.749816*T^1-0.0157244*T^2+1.264375E-5*T^3}
        argunit = K
        fununit = kg/m^3
      TD_liquid_2: Piecewise | arg = T; pieces = {273.15, 333.16, 8.04E-8+2.0E-10*T^1}; argunit = K; fununit = m^2/s
      eta_liquid_1: Piecewise | arg = T; pieces = {265.0, 423.16, exp(1.47297892E+11/T^4 - 1.56916127E+09/T^3 + 6.52798499E+06/T^2 - 1.10421451E+04/T - 2.86320560E+00)}; argunit = K; fununit = Pa*s
      SurfF: Piecewise
        arg = T
        pieces = 
          {274.0, 568.0, 0.0774685638+2.071003E-4*T^1-1.23147E-6*T^2+2.344068E-9*T^3-3.033107E-12*T^4+1.758716E-15*T^5}
          {568.0, 647.0, -109.3735+0.9291756*T^1-0.003154159*T^2+5.351438E-6*T^3-4.539449E-9*T^4+1.540327E-12*T^5}
        argunit = K
        fununit = N/m
    ThermalExpansion: ThermalExpansion
      alphatan = CTE_liquid_2(T)
      dL = (dL_liquid_2(T)-dL_liquid_2(Tempref))/(1+dL_liquid_2(Tempref))
      dL_liquid_2: Piecewise
        arg = T
        pieces = 
          {273.15, 283.0, 0.008486347802-6.947021E-5*T^1+1.333373E-7*T^2}
          {283.0, 373.16, 0.2324466367-0.002030447*T^1+5.510259E-6*T^2-4.395999E-9*T^3}
        argunit = K
      CTE_liquid_2: Piecewise
        arg = T
        pieces = 
          {273.15, 283.0, -6.947321E-5+2.666746E-7*T^1}
          {283.0, 293.0, -0.01363714988+8.893977E-5*T^1-1.43925E-7*T^2}
          {293.0, 373.16, -0.002030450346+1.102052E-5*T^1-1.3188E-8*T^2}
        argunit = K
        fununit = 1/K

Physics
  spf: CreepingFlow on all domains
    dependent variable u = {u, v, w}
    fp1: FluidProperties (default) | mu_mat = from_mat
    init1: init "Initial Values 1" (default)
    wallbc1: WallBC "Wall 1" (default)
    inl1: InletBoundary "Inlet 1" on boundaries 1 | BoundaryCondition = Pressure; p0 = P_in; PressureType = StaticPressure
    out1: OutletBoundary "Outlet 1" on boundaries 6 | p0 = P_out; NormalFlow = 1

Mesh
  mesh1 "Mesh 1" (physics-controlled)
    size: MeshSizeDefault | table = cfd; hauto = 7

Studies
  std1 "Study 1"
    param: Parametric "Parametric Sweep" | pname = P_in; plistarr = range(100, 25, 300); punit = Pa
    stat: Stationary

Solver configurations
  sol1 "Solution 1" (study std1)
    v1: Variables "Dependent Variables 1"
    s1: Stationary "Stationary Solver 1"
      p1: Parametric
      fc1: FullyCoupled
      i1: Iterative "AMG, fluid flow variables (spf)"
        mg1: Multigrid

Datasets
  dset1: Solution | solution = sol1
  surf1: Surface "Exterior Walls" on boundaries 2-5 | data = dset1
  cln1: CutLine3D "Cut Line Z (center)"
    data = dset1
    genpoints = {{ch_length/2, 0, -ch_diameter}, {ch_length/2, 0, ch_diameter}}
  cln2: CutLine3D "Cut Line Y (center)"
    data = dset1
    genpoints = {{ch_length/2, -ch_radius, 0}, {ch_length/2, ch_radius, 0}}
  cpl1: CutPlane "Cut Plane 1 (x = ch_length/2)" | data = dset1; quickx = ch_length/2
  cpt1: CutPoint3D "Cut Point 3D (center)" | data = dset1; pointx = ch_length/2; pointy = 0; pointz = 0
  cln3: CutLine3D "Cut Line along x, center" | data = dset1; genpoints = {{0, 0, 0}, {ch_length, 0, 0}}

Derived values
  max1: MaxSurface "Maximum Velocity" | data = cpl1; table = tbl1; expr = spf.U
  pev1: EvalPoint "Velocity at center" | data = cpt1; table = tbl2; expr = {spf.U, Er_vMax}
  int1: IntSurface "Volumetric Flow Rate" on boundaries 1 | data = dset1; table = tbl3; expr = spf.U

Plots
  pg1: PlotGroup3D "Velocity (spf)" | data = dset1
    slc1: Slice | expr = spf.U
  pg2: PlotGroup3D "Pressure (spf)" | data = surf1
    surf1: Surface | expr = p
      tran1: Transparency
  pg3: PlotGroup1D "velocity vs z" | data = cln1; title = Line Graph: Velocity magnitude (m/s) over Z axis (m)
    lngr1: LineGraph "numerical" | expr = spf.U; xdata = expr; xdataexpr = z; legends = numerical velocity (m/s)
    lngr2: LineGraph "analytical" | expr = velocity_an; xdata = expr; xdataexpr = z; legends = analytical velocity (m/s)
  pg4: PlotGroup1D "velocity vs y" | data = cln2; title = Line Graph: Velocity magnitude (m/s) over Y axis (m)
    lngr2: LineGraph "numerical" | expr = spf.U; xdata = expr; legends = Numerical velocity (m/s)
    lngr3: LineGraph "analytical" | expr = velocity_an; xdata = expr; xdataexpr = y; legends = analytical velocity (m/s)
  pg6: PlotGroup1D "velocity vs x" | data = cln3
    lngr1: LineGraph | expr = u; xdata = expr; xdataexpr = x
  pg5: PlotGroup1D "Pressure vs x" | data = cln3
    lngr1: LineGraph "numerical" | expr = p; xdata = expr; xdataexpr = x; legends = Numerical Pressure (Pa)
    lngr2: LineGraph "analytical" | expr = Pressure_an; xdata = expr; xdataexpr = x; legends = Analytical Pressure (Pa)
  pg7: PlotGroup1D "Flowrate vs Pressure" | data = dset1; title = Volumetric flow rate (m^3 / s) vs Pressure (Pa)
    tblp1: Table "Table Graph 1" | table = tbl3; xaxisdata = 1; legends = Numerical Volumetric Flow Rate
    glob1: Global | expr = VFlowRate_an; legends = Analytical Volumetric Flow Rate