// COMSOL Multiphysics 6.4.0.429 model "5. rectangular channel Couette-Poiseuille flow.mph"
// Outline of the model tree

Parameters
  ch_height = 100E-6 [m]
  ch_width = 500E-6 [m]
  ch_length = 1 [cm]
  P_out = 0 [Pa]
  P_in = 300 [Pa]
  U_wall = 1E-3 [m/s]
  par_diameter = 1E-6 [m]
  par_density = 1050 [kg/m^3]
  N_Fourier = 25
  dP = abs(P_in - P_out)

Variables
  var1 "Variables 1"
    u_cou_an = (4*U_wall/pi)*sum(((-1)^n/(2*n+1))*cos((2*n+1)*pi*y/ch_width)*sinh((2*n+1)*pi*z/ch_width)/sinh((2*n+1)*pi*ch_height/ch_width),n,0,N_Fourier-1)
    u_poi_an = (dP/ch_length)/(2*0.001[Pa*s])*z*(ch_height-z)-(4*(dP/ch_length)*ch_height^2/(0.001[Pa*s]*pi^3))*sum((1/(2*n+1)^3)*cosh((2*n+1)*pi*y/ch_height)/cosh((2*n+1)*pi*ch_width/(2*ch_height))*sin((2*n+1)*pi*z/ch_height),n,0,N_Fourier-1)
    Q_cou_an = (8*U_wall*ch_width^2/pi^3)*sum(tanh((2*n+1)*pi*ch_height/(2*ch_width))/(2*n+1)^3,n,0,N_Fourier-1)
    Q_poi_an = ((dP/ch_length)*ch_width*ch_height^3/(12*0.001[Pa*s]))*(1-(192*ch_height/(pi^5*ch_width))*sum(tanh((2*n+1)*pi*ch_width/(2*ch_height))/(2*n+1)^5,n,0,N_Fourier-1))
    u_an = u_cou_an + u_poi_an
    Q_an = Q_cou_an + Q_poi_an
    Q_num = int.out.su(u)
    Q_AbsEr = abs(Q_an - Q_num)
    Q_RelEr = 100*abs(Q_an - Q_num)/Q_an
    P_an = (((dP)/ch_length)* (ch_length-x) ) + P_out
    u_err_abs = abs(u-u_an)
    U_ref = maxop1(abs(u))
    u_err_norm = abs(u-u_an)/U_ref

Couplings
  intop1: Integration "Outlet Surface Int" on boundaries 6 | opname = int.out.su
  maxop1: Maximum "Velocity Error" on domains 1

Geometry
  geom1 "Geometry 1" (3D, length unit m)
    blk1: Block | size = {ch_length, ch_width, ch_height}; pos = {0, -ch_width/2, 0}
    fin: Finalize "Form Union"
  pgeom_fpt "Geometry" (1D, length unit m)
    pt1: Point

Materials
  mat1: Common "H2O (water) [liquid]" on domains 1
    def: def "Basic"
      thermalconductivity = k_liquid_2(T)
      thermalexpansioncoefficient = (alpha_liquid_2(T)+(Tempref-293[K])*if(abs(T-Tempref)>1e-3,(alpha_liquid_2(T)-alpha_liquid_2(Tempref))/(T-Tempref),d(alpha_liquid_2(T),T)))/(1+alpha_liquid_2(Tempref)*(Tempref-293[K]))
      heatcapacity = C_liquid_2(T)
      HC = HC_liquid_2(T)
      VP = VP_liquid_2(T)
      density = rho_liquid_2(T)
      TD = TD_liquid_2(T)
      dynamicviscosity = eta_liquid_1(T)
      SurfF = SurfF(T)
      k_liquid_2: Piecewise | arg = T; pieces = {275.0, 370.0, -0.9003748+0.008387698*T^1-1.118205E-5*T^2}; argunit = K; fununit = W/(m*K)
      alpha_liquid_2: Piecewise
        arg = T
        pieces = 
          {273.15, 283.0, 0.01032507-7.62815E-5*T^1+1.412474E-7*T^2}
          {283.0, 373.16, -0.002464189354+1.947611E-5*T^1-5.049672E-8*T^2+4.616995E-11*T^3}
        argunit = K
        fununit = 1/K
      C_liquid_2: Piecewise | arg = T; pieces = {293.0, 373.16, 4035.840794+0.4923120336*T^1}; argunit = K; fununit = J/(kg*K)
      HC_liquid_2: Piecewise | arg = T; pieces = {293.0, 373.16, 72.6451184+0.008861615768*T^1}; argunit = K; fununit = J/(mol*K)
      VP_liquid_2: Piecewise | arg = T; pieces = {280.0, 600.0, (exp((-2.005121830e+03/T-5.565700000e-01*log10(T)+9.898790000e+00-1.111690086e+07/T^3)*log(10.0)))*1.333200000e+02}; argunit = K; fununit = Pa
      rho_liquid_2: Piecewise
        arg = T
        pieces = 
          {273.15, 283.0, 972.7578145+0.2084*T^1-4.0E-4*T^2}
          {283.0, 373.16, 345.28+5.749816*T^1-0.0157244*T^2+1.264375E-5*T^3}
        argunit = K
        fununit = kg/m^3
      TD_liquid_2: Piecewise | arg = T; pieces = {273.15, 333.16, 8.04E-8+2.0E-10*T^1}; argunit = K; fununit = m^2/s
      eta_liquid_1: Piecewise | arg = T; pieces = {265.0, 423.16, exp(1.47297892E+11/T^4 - 1.56916127E+09/T^3 + 6.52798499E+06/T^2 - 1.10421451E+04/T - 2.86320560E+00)}; argunit = K; fununit = Pa*s
      SurfF: Piecewise
        arg = T
        pieces = 
          {274.0, 568.0, 0.0774685638+2.071003E-4*T^1-1.23147E-6*T^2+2.344068E-9*T^3-3.033107E-12*T^4+1.758716E-15*T^5}
          {568.0, 647.0, -109.3735+0.9291756*T^1-0.003154159*T^2+5.351438E-6*T^3-4.539449E-9*T^4+1.540327E-12*T^5}
        argunit = K
        fununit = N/m
    ThermalExpansion: ThermalExpansion
      alphatan = CTE_liquid_2(T)
      dL = (dL_liquid_2(T)-dL_liquid_2(Tempref))/(1+dL_liquid_2(Tempref))
      dL_liquid_2: Piecewise
        arg = T
        pieces = 
          {273.15, 283.0, 0.008486347802-6.947021E-5*T^1+1.333373E-7*T^2}
          {283.0, 373.16, 0.2324466367-0.002030447*T^1+5.510259E-6*T^2-4.395999E-9*T^3}
        argunit = K
      CTE_liquid_2: Piecewise
        arg = T
        pieces = 
          {273.15, 283.0, -6.947321E-5+2.666746E-7*T^1}
          {283.0, 293.0, -0.01363714988+8.893977E-5*T^1-1.43925E-7*T^2}
          {293.0, 373.16, -0.002030450346+1.102052E-5*T^1-1.3188E-8*T^2}
        argunit = K
        fununit = 1/K

Physics
  spf: CreepingFlow on all domains
    dependent variable u = {u, v, w}
    TurbulenceModelProperty.c4_PS_om = ((9*0.52)+6)/11
    TurbulenceModelProperty.c5_PS_om = (10-(7*0.52))/11
    fp1: FluidProperties (default)
    init1: init "Initial Values 1" (default)
    wallbc1: WallBC "Wall 1" (default) | zeta = (-0.1)[V]
    inl1: InletBoundary "Inlet 1" on boundaries 1 | BoundaryCondition = Pressure; p0 = P_in
    out1: OutletBoundary "Outlet 1" on boundaries 6 | p0 = P_out; NormalFlow = 1; SuppressBackflow = 0
    wallbc2: WallBC "Wall 2" on boundaries 4 | zeta = (-0.1)[V]; uvwwall = {U_wall, 0, 0}; SlidingWall = 1
  fpt: FluidParticleTracing "Particle Tracing for Fluid Flow" on all domains
    dependent variable q = {qx, qy, qz}
    Formulation.Formulation = NewtonianIgnoreInertialTerms
    MaximumSecondary.MaximumSecondary = 0
    wall1: Wall (default)
    pp1: ParticleProperties | dp = par_diameter; rhop_mat = userdef; rhop = par_density
    inl1: Inlet on boundaries 1 | u_src = root.comp1.u
    out1: Outlet on boundaries 5
    df1: DragForce on domains 1 | u_src = root.comp1.u

Multiphysics
  fpi1: FluidParticleInteraction on all domains | BodyForceSource_physics = fpt; BodyForceDestination_physics = spf

Mesh
  mesh1 "Mesh 1" (physics-controlled)
    size: MeshSizeDefault | table = cfd; hauto = 6

Studies
  std1 "Study 1"
    stat: Stationary | activateCoupling = {fpi1, off}
    time: Transient "Time Dependent"
      tlist = range(0,0.1,1)
      solve for = {fpt, comp1}
      useinitsol = on
      initmethod = sol
      initstudy = std1

Solver configurations
  sol1 "Solution 1" (study std1)
    v1: Variables "Dependent Variables 1"
    s1: Stationary "Stationary Solver 1"
      fc1: FullyCoupled | linsolver = i1; initstep = 0.01; maxiter = 100
      i1: Iterative "AMG, fluid flow variables (spf)" | nlinnormuse = on; maxlinit = 1000; rhob = 75
        mg1: Multigrid | prefun = saamg; maxcoarsedof = 80000; strconn = 0.02; saamgcompwise = on
    su1: StoreSolution "Solution Store 1"
    v2: Variables "Dependent Variables 2" | initmethod = sol; notsolmethod = sol
    t1: Time "Time-Dependent Solver 1" | rtol = 1.0E-5; timemethod = genalpha; estrat = exclude; tstepsgenalpha = strict
      dDef: Direct | linsolver = cudss
      se1: Segregated
        ss1: SegregatedStep "Particle Tracing Variables" | segvar = {comp1_qfpt}
  sol2 "Solution Store 1" (study std1)

Datasets
  dset1: Solution | solution = sol1
  dset2: Solution | solution = sol2
  part1: Particle | solution = sol1
  cln1: CutLine3D "Cut Line 3D y=0, 0<z<h" | data = dset1; genpoints = {{ch_length/2, 0, 0}, {ch_length/2, 0, ch_height}}
  cln2: CutLine3D "Cut Line 3D z=0.65*h, -1/2w<y<1/2w"
    data = dset1
    genpoints = {{ch_length/2, -ch_width/2, 0.65*ch_height}, {ch_length/2, ch_width/2, 0.65*ch_height}}
  cpl1: CutPlane "Cut Plane 1 x=L/2" | data = dset1; quickx = ch_length/2
  cpl4: CutPlane "Cut Plane z = 0.75*h"
    data = dset1
    quickplane = xy
    quickz = 0.75*ch_height
    planevar = cpl2number
    spacevars = {cpl2x, cpl2y}
    normal = {cpl2nx, cpl2ny, cpl2nz}
  cpl6: CutPlane "Cut Plane 6 (Animation)" | data = dset1; quickplane = xy; quickz = zcut
  cln3: CutLine3D "Cut Line 3D 0<x<L" | data = dset1; genpoints = {{0, 0, ch_height/2}, {ch_length, 0, ch_height/2}}

Derived values
  gev1: EvalGlobal "Flowrate Global Evalutaion"
    data = dset1
    table = tbl1
    expr = {Q_num, Q_an, Q_AbsEr, Q_RelEr}
    unit = {m^3/s, m^3/s, m^3/s, 1}
    descr = {Numerical Flowrate, Analytical Flowrate, Flowrate Absolute Error, Flowrate Relative Error}
  gev2: EvalGlobal "Global Evaluation 2"
    data = dset1
    table = tbl2
    expr = sqrt(int.out.su((u-u_an)^2)/int.out.su(u_an^2))
    unit = 1
    descr = Relative L2 Velocity Error

Plots
  pg1: PlotGroup3D "Velocity (spf)" | data = dset1
    mslc1: Multislice | expr = spf.U
  pg2: PlotGroup3D "Pressure (spf)" | data = dset1
    surf1: Surface | expr = p; bandcount = 25
      sel1: Selection on boundaries 1, 3, 4, 6
  pg3: PlotGroup3D "Particle Trajectories (fpt)" | data = part1
    traj1: ParticleTrajectories | linetype = none; pointtype = point; sphereradiusscale = 0.0265387589353
      col1: Color "Color Expression 1" | expr = fpt.V
  pg4: PlotGroup1D "Velocity y=0, 0<z<h" | data = cln1
    lngr1: LineGraph "Numerical Solution" | expr = spf.U; legends = Numerical Solution (t=0)
    lngr2: LineGraph "Analytical Solution" | expr = u_an; xdata = expr; xdataexpr = z; legends = Analytical Solution
  pg5: PlotGroup1D "Velocity z=65*h, -1/2w<y<1/2w" | data = cln2
    lngr1: LineGraph "Numerical Solution" | expr = spf.U; xdata = expr; xdataexpr = y; legends = Numerical Solution (t=0)
    lngr2: LineGraph "Analytical Solution" | expr = u_an; xdata = expr; xdataexpr = y; legends = Analytical Solution
  pg6: PlotGroup2D "Velocity Surface Map (x=L/2)" | data = cpl1
    surf1: Surface | expr = spf.U
  pg8: PlotGroup2D "Velocity Surface Map" | data = cpl4; plotarraytype = square; displacementsquare = absolute
    surf3: Surface "z = 0.75 * h" | data = cpl4; expr = u
  pg7: PlotGroup2D "Velocity Surface Map (Animation)" | data = cpl6; plotarraytype = square; displacementsquare = absolute
    surf3: Surface "z = 0.75 * h" | data = cpl4; expr = u
  pg9: PlotGroup1D "Pressure vs x" | data = cln3
    lngr1: LineGraph "Numerical Solution" | expr = p; xdata = expr; xdataexpr = x; legends = Numerical Solution (t=0s)
    lngr2: LineGraph "Analytical Solution" | expr = P_an; xdata = expr; xdataexpr = x; legends = Analytical Solution
  pg10: PlotGroup2D "Velocity Error" | data = cpl1
    surf1: Surface | expr = u_err_norm

Exports
  anim1: Animation | target = player; sweeptype = parameter; parameter = zcut; pstop = ch_height