// COMSOL Multiphysics 6.4.0.429 model "2. planar (infinite parallel plates) Poiseuille flow.mph"
// Outline of the model tree

Parameters
  ch_height = 0.25 [m]
  ch_length = 0.75 [m]
  u_int = 0.1 [m/s]
  P_in = 2E-4 [Pa]
  P_out = 0 [Pa]
  P_step = 5E-5 [Pa]
  w_visc = 1E-3 [Pa * s]
  ch_width = 0.8 [m]

Variables
  var1 "Variables 1"
    v_analytical = (abs(P_in - P_out) /(2*w_visc*ch_length))*(y*(ch_height-y))

Geometry
  geom1 "Geometry 1" (2D, length unit m)
    r1: Rectangle | size = {ch_length, ch_height}
    fin: Finalize "Form Union"

Materials
  mat1: Common "H2O (water) [liquid]" on all domains
    def: def "Basic"
      thermalconductivity = k_liquid_2(T)
      thermalexpansioncoefficient = (alpha_liquid_2(T)+(Tempref-293[K])*if(abs(T-Tempref)>1e-3,(alpha_liquid_2(T)-alpha_liquid_2(Tempref))/(T-Tempref),d(alpha_liquid_2(T),T)))/(1+alpha_liquid_2(Tempref)*(Tempref-293[K]))
      heatcapacity = C_liquid_2(T)
      HC = HC_liquid_2(T)
      VP = VP_liquid_2(T)
      density = rho_liquid_2(T)
      TD = TD_liquid_2(T)
      dynamicviscosity = eta_liquid_1(T)
      SurfF = SurfF(T)
      k_liquid_2: Piecewise | arg = T; pieces = {275.0, 370.0, -0.9003748+0.008387698*T^1-1.118205E-5*T^2}; argunit = K; fununit = W/(m*K)
      alpha_liquid_2: Piecewise
        arg = T
        pieces = 
          {273.15, 283.0, 0.01032507-7.62815E-5*T^1+1.412474E-7*T^2}
          {283.0, 373.16, -0.002464189354+1.947611E-5*T^1-5.049672E-8*T^2+4.616995E-11*T^3}
        argunit = K
        fununit = 1/K
      C_liquid_2: Piecewise | arg = T; pieces = {293.0, 373.16, 4035.840794+0.4923120336*T^1}; argunit = K; fununit = J/(kg*K)
      HC_liquid_2: Piecewise | arg = T; pieces = {293.0, 373.16, 72.6451184+0.008861615768*T^1}; argunit = K; fununit = J/(mol*K)
      VP_liquid_2: Piecewise | arg = T; pieces = {280.0, 600.0, (exp((-2.005121830e+03/T-5.565700000e-01*log10(T)+9.898790000e+00-1.111690086e+07/T^3)*log(10.0)))*1.333200000e+02}; argunit = K; fununit = Pa
      rho_liquid_2: Piecewise
        arg = T
        pieces = 
          {273.15, 283.0, 972.7578145+0.2084*T^1-4.0E-4*T^2}
          {283.0, 373.16, 345.28+5.749816*T^1-0.0157244*T^2+1.264375E-5*T^3}
        argunit = K
        fununit = kg/m^3
      TD_liquid_2: Piecewise | arg = T; pieces = {273.15, 333.16, 8.04E-8+2.0E-10*T^1}; argunit = K; fununit = m^2/s
      eta_liquid_1: Piecewise | arg = T; pieces = {265.0, 423.16, exp(1.47297892E+11/T^4 - 1.56916127E+09/T^3 + 6.52798499E+06/T^2 - 1.10421451E+04/T - 2.86320560E+00)}; argunit = K; fununit = Pa*s
      SurfF: Piecewise
        arg = T
        pieces = 
          {274.0, 568.0, 0.0774685638+2.071003E-4*T^1-1.23147E-6*T^2+2.344068E-9*T^3-3.033107E-12*T^4+1.758716E-15*T^5}
          {568.0, 647.0, -109.3735+0.9291756*T^1-0.003154159*T^2+5.351438E-6*T^3-4.539449E-9*T^4+1.540327E-12*T^5}
        argunit = K
        fununit = N/m
    ThermalExpansion: ThermalExpansion
      alphatan = CTE_liquid_2(T)
      dL = (dL_liquid_2(T)-dL_liquid_2(Tempref))/(1+dL_liquid_2(Tempref))
      dL_liquid_2: Piecewise
        arg = T
        pieces = 
          {273.15, 283.0, 0.008486347802-6.947021E-5*T^1+1.333373E-7*T^2}
          {283.0, 373.16, 0.2324466367-0.002030447*T^1+5.510259E-6*T^2-4.395999E-9*T^3}
        argunit = K
      CTE_liquid_2: Piecewise
        arg = T
        pieces = 
          {273.15, 283.0, -6.947321E-5+2.666746E-7*T^1}
          {283.0, 293.0, -0.01363714988+8.893977E-5*T^1-1.43925E-7*T^2}
          {293.0, 373.16, -0.002030450346+1.102052E-5*T^1-1.3188E-8*T^2}
        argunit = K
        fununit = 1/K

Physics
  spf: CreepingFlow on all domains
    dependent variable u = {u, v, w}
    fp1: FluidProperties (default) | rho_mat = from_mat; mu_mat = userdef; mu = w_visc
    init1: init "Initial Values 1" (default)
    wallbc1: WallBC "Wall 1" (default)
    inl1: InletBoundary "Inlet 1" on boundaries 1
      BoundaryCondition = Pressure
      ComponentWise = NormalInflowVelocity
      U0in = u_int
      p0 = P_in
    out1: OutletBoundary "Outlet 1" on boundaries 4 | p0 = P_out; NormalFlow = 1

Mesh
  mesh1 "Mesh 1" (physics-controlled)
    size: MeshSizeDefault | table = cfd

Studies
  std1 "Study 1"
    param: Parametric "Parametric Sweep"
      sweeptype = filled
      pname = {P_in, w_visc, ch_height}
      plistarr = {"5E-5, 1E-4, 1.5E-4, 2E-4, 2.5E-4", 1e-3[Pa*s] 1.5e-3[Pa*s] 2e-3[Pa*s] 3e-3[Pa*s] 5e-3[Pa*s], "0.10 [m], 0.15 [m], 0.20[m], 0.25[m], 0.30[m]"}
      punit = {Pa, Pa*s, m}
    stat: Stationary

Solver configurations
  sol1 "Solution 1" (study std1)
    v1: Variables "Dependent Variables 1"
    s1: Stationary "Stationary Solver 1"
      fc1: FullyCoupled
      d1: Direct "Direct, fluid flow variables (spf)"
  sol2 "Parametric Solutions 1" (study std1)

Datasets
  dset1: Solution | solution = sol1
  dset2: Solution | solution = sol2
  cln1: CutLine2D | data = dset2; genpoints = {{0.375, 0}, {0.375, 0.3}}

Derived values
  max1: MaxLine "Max velocity vs P (len = 0.2 m , visc = 0.001)" | data = cln1; table = tbl1; expr = spf.U
  int1: IntLine "volumetric flow rate" | data = cln1; table = tbl2; expr = ch_width * u
  max2: MaxLine "Max velocity vs viscosity (len = 0.2 m , P = 2E-4)" | data = cln1; table = new; expr = spf.U

Plots
  pg1: PlotGroup2D "Velocity (spf)" | data = dset2
    surf1: Surface | expr = spf.U
  pg2: PlotGroup2D "Pressure (spf)" | data = dset2
    con1: Contour | expr = p; levelrounding = off
  pg3: PlotGroup1D "velocity vs z (height = 0.2 , viscosity = 0.001)"
    data = cln1
    title = Line Graph: Velocity magnitude (m/s) vs height (max height = 0.2 m , viscosity = 0.001 Pa.s)
    xlabel = Height (m)
    lngr1: LineGraph | data = cln1; expr = spf.U
  pg4: PlotGroup1D "velocity vs z (height = 0.2 , viscosity = 0.001) (numerical vs analytical test)"
    data = cln1
    title = Line Graph: Velocity magnitude (m/s) vs height (max height = 0.3 m , viscosity = 0.001 Pa.s)
    xlabel = Height (m)
    lngr1: LineGraph "numerical" | data = cln1; expr = spf.U
    lngr2: LineGraph "analytical" | data = cln1; expr = v_analytical
  pg5: PlotGroup1D "max velocity vs Pressure" | data = cln1; ylabel = Maximum Velocity magnitude (m/s)
    tblp1: Table "Table Graph 1"
      table = tbl1
      xaxisdata = 1
      plotcolumninput = manual
      plotcolumns = 4
      legends = Maximum Velocity magnitude (m/s)
  pg6: PlotGroup1D "Volumetric flow rate vs height" | data = cln1
    tblp1: Table "Table Graph 1" | table = tbl2; xaxisdata = 3; plotcolumninput = manual; plotcolumns = 4
  pg7: PlotGroup1D "log-log Volumetric flow rate vs height" | data = cln1
    tblp1: Table "Table Graph 1" | table = tbl2; xaxisdata = 3; plotcolumninput = manual; plotcolumns = 4