// COMSOL Multiphysics 6.4.0.429 model "4. 3D Rectangular Couette flow creeping.mph"
// Outline of the model tree

Parameters
  ch_height = 100E-6 [m]
  ch_width = 500E-6 [m]
  ch_length = 1 [cm]
  P_out = 0 [Pa]
  P_in = 300 [Pa]
  U_wall = 1E-3 [m/s]
  par_diameter = 1E-6 [m]
  par_density = 1050 [kg/m^3]
  N_Fourier = 50

Variables
  var1 "Variables 1"
    inf_AnVel = U_wall * z / ch_height
    u_an = sum((4*U_wall/((2*k+1)*pi))* ((-1)^k)* cos((2*k+1)*pi*y/ch_width)* sinh((2*k+1)*pi*z/ch_width)/ sinh((2*k+1)*pi*ch_height/ch_width) ,k,0,N_Fourier-1)
    Q_an = (8*U_wall/ch_width)*sum((cosh(((2*n+1)*pi/ch_width)*ch_height)-1)/(((2*n+1)*pi/ch_width)^3*sinh(((2*n+1)*pi/ch_width)*ch_height)),n,0,N_Fourier-1)
    Q_num = intop1(u)
    Q_RelEr = abs((Q_an-Q_num)/abs(Q_an))*100

Couplings
  intop1: Integration "Qint_out" on boundaries 6

Geometry
  geom1 "Geometry 1" (3D, length unit m)
    blk1: Block | size = {ch_length, ch_width, ch_height}; pos = {0, -ch_width/2, 0}
    fin: Finalize "Form Union"

Materials
  mat1: Common "H2O (water) [liquid]" on all domains
    def: def "Basic"
      thermalconductivity = k_liquid_2(T)
      thermalexpansioncoefficient = (alpha_liquid_2(T)+(Tempref-293[K])*if(abs(T-Tempref)>1e-3,(alpha_liquid_2(T)-alpha_liquid_2(Tempref))/(T-Tempref),d(alpha_liquid_2(T),T)))/(1+alpha_liquid_2(Tempref)*(Tempref-293[K]))
      heatcapacity = C_liquid_2(T)
      HC = HC_liquid_2(T)
      density = rho_liquid_2(T)
      TD = TD_liquid_2(T)
      dynamicviscosity = eta_liquid_1(T)
      SurfF = SurfF(T)
      k_liquid_2: Piecewise | arg = T; pieces = {275.0, 373.15, -0.9003748+0.008387698*T^1-1.118205E-5*T^2}; argunit = K; fununit = W/(m*K)
      alpha_liquid_2: Piecewise
        arg = T
        pieces = 
          {273.15, 283.0, 0.01032507-7.62815E-5*T^1+1.412474E-7*T^2}
          {283.0, 373.16, -0.002464189354+1.947611E-5*T^1-5.049672E-8*T^2+4.616995E-11*T^3}
        argunit = K
        fununit = 1/K
      C_liquid_2: Piecewise | arg = T; pieces = {293.0, 373.16, 4035.8407944+0.4923120336*T^1}; argunit = K; fununit = J/(kg*K)
      HC_liquid_2: Piecewise | arg = T; pieces = {293.0, 373.16, 72.6451184+0.008861615768*T^1}; argunit = K; fununit = J/(mol*K)
      rho_liquid_2: Piecewise
        arg = T
        pieces = 
          {273.15, 283.0, 972.7578145+0.2084*T^1-4.0E-4*T^2}
          {283.0, 373.16, 345.28+5.749816*T^1-0.0157244*T^2+1.264375E-5*T^3}
        argunit = K
        fununit = kg/m^3
      TD_liquid_2: Piecewise | arg = T; pieces = {273.15, 333.16, 8.04E-8+2.0E-10*T^1}; argunit = K; fununit = m^2/s
      eta_liquid_1: Piecewise | arg = T; pieces = {265.0, 423.15, exp(1.47297892E+11/T^4 - 1.56916127E+09/T^3 + 6.52798499E+06/T^2 - 1.10421451E+04/T - 2.86320560E+00)}; argunit = K; fununit = Pa*s
      SurfF: Piecewise
        arg = T
        pieces = 
          {274.0, 568.0, 0.0774685638+2.071003E-4*T^1-1.23147E-6*T^2+2.344068E-9*T^3-3.033107E-12*T^4+1.758716E-15*T^5}
          {568.0, 647.0, -109.3735+0.9291756*T^1-0.003154159*T^2+5.351438E-6*T^3-4.539449E-9*T^4+1.540327E-12*T^5}
        argunit = K
        fununit = N/m
    ThermalExpansion: ThermalExpansion
      alphatan = CTE_liquid_2(T)
      dL = (dL_liquid_2(T)-dL_liquid_2(Tempref))/(1+dL_liquid_2(Tempref))
      dL_liquid_2: Piecewise
        arg = T
        pieces = 
          {273.15, 283.0, 0.008486347802-6.947021E-5*T^1+1.333373E-7*T^2}
          {283.0, 373.16, 0.2324466367-0.002030447*T^1+5.510259E-6*T^2-4.395999E-9*T^3}
        argunit = K
      CTE_liquid_2: Piecewise
        arg = T
        pieces = 
          {273.15, 283.0, -6.947321E-5+2.666746E-7*T^1}
          {283.0, 293.0, -0.01363714988+8.893977E-5*T^1-1.43925E-7*T^2}
          {293.0, 373.16, -0.002030450346+1.102052E-5*T^1-1.3188E-8*T^2}
        argunit = K
        fununit = 1/K

Physics
  spf: CreepingFlow on all domains
    dependent variable u = {u, v, w}
    fp1: FluidProperties (default)
    init1: init "Initial Values 1" (default)
    wallbc1: WallBC "Wall 1" (default)
    wallbc2: WallBC "Wall 2" on boundaries 4 | uvwwall = {U_wall, 0, 0}; SlidingWall = 1
    inl1: InletBoundary "Inlet 1" on boundaries 1 | BoundaryCondition = Pressure; SuppressBackflow = 0
    out1: OutletBoundary "Outlet 1" on boundaries 6 | NormalFlow = 1; SuppressBackflow = 0

Mesh
  mesh1 "Mesh 1" (physics-controlled)
    size: MeshSizeDefault | table = cfd; hauto = 6

Studies
  std1 "Study 1"
    stat: Stationary

Solver configurations
  sol1 "Solution 1" (study std1)
    v1: Variables "Dependent Variables 1"
    s1: Stationary "Stationary Solver 1"
      fc1: FullyCoupled
      i1: Iterative "AMG, fluid flow variables (spf)"
        mg1: Multigrid

Datasets
  dset1: Solution | solution = sol1
  cpl1: CutPlane | data = dset1; quickx = ch_length/2
  cln1: CutLine3D "Cut Line 3D (0<z<h)" | data = dset1; genpoints = {{ch_length/2, 0, 0}, {ch_length/2, 0, ch_height}}
  cln2: CutLine3D "Cut Line 3D (0<y<w)"
    data = dset1
    genpoints = {{ch_length/2, ch_width/2, 0.65*ch_height}, {ch_length/2, -ch_width/2, 0.65*ch_height}}

Derived values
  int1: IntSurface "Volumetric Flow Rate (numeric)" on boundaries 1 | data = dset1; table = tbl1; expr = u
  gev1: EvalGlobal "Global Evaluation 1" | data = dset1; table = tbl2; expr = {Q_num, Q_an, Q_RelEr}
  max1: MaxLine "Velocity Error 0<z<h" | data = cln1; table = tbl3; expr = {abs(u-u_an), 100*abs(u-u_an)/U_wall}
  max2: MaxLine "Velocity Error z=0.65*h , -1/2w<y<1/2w"
    data = cln2
    table = tbl4
    expr = {abs(u-u_an), 100*abs(u-u_an)/U_wall}

Plots
  pg1: PlotGroup3D "Velocity (spf)" | data = dset1
    mslc1: Multislice | expr = spf.U
  pg2: PlotGroup3D "Pressure (spf)" | data = dset1
    surf1: Surface | expr = p; bandcount = 25
      sel1: Selection on boundaries 2-5
  pg3: PlotGroup2D "Velocity Magnitude (Cross Section) Map" | data = cpl1
    surf1: Surface | data = cpl1; expr = spf.U
  pg4: PlotGroup1D "Velocity magnitude at y = 0" | data = cln1
    lngr1: LineGraph "Numerical Solution"
      expr = spf.U
      prefixintitle = Velocity Magnitue for Rectangular Channel
      xdataexpr = z
      legends = Rectangular Channel
    lngr2: LineGraph "Parallel Plate Analytical Solution"
      expr = inf_AnVel
      title = Velocity Magnitude for infinitely wide parallel plates
      xdata = expr
      xdataexpr = z
      legends = Parallel Plates Analytical Solution
    lngr3: LineGraph "Rectangular Analytical Solution"
      data = cln1
      expr = u_an
      xdata = expr
      xdataexpr = z
      legends = Rectangular Analytical Solution
  pg5: PlotGroup1D "Horizontal Velocity Profile at z = 0.65*h" | data = cln2
    lngr1: LineGraph "Numerical Solution" | expr = spf.U; xdata = expr; xdataexpr = y; legends = Numerical Solution
    lngr2: LineGraph "Analytical Solution" | expr = u_an; xdata = expr; xdataexpr = y; legends = Analytical Solution